// COMSOL Multiphysics 5.6.0.401 model "fish_v6.mph"
// Outline of the model tree

Parameters
  c1 = 0.002997180904265
  c2 = 0.020600558880515
  c3 = -0.040537635755492
  c4 = 0.097600742072607
  kL = 6.996450019080868  // wave number, nondim
  lambda = 2*pi/kL  // wavelength, nondim
  U = 15.418333538045411 [cm/s]  // inlet flow
  L = 0.035481891661866 [m]  // body length
  L_tunnel = 0.15 [m]  // length of tunnel
  D_tunnel = 0.15 [m]  // tunnel diameter
  omega = 54.322003372290013 [Hz]  // angular TBF
  TBF = omega/(2*pi)  // dimensional TBF
  char_time = L/U
  f = TBF*char_time  // nondimensional TBF
  t_final = 25/TBF  // terminal simulation time
  t_step = 0.1/TBF

Functions
  an1: Analytic "theta" | funcname = theta; expr = L*(c1 + c2*(x/L) + c3*(x/L)^2 + c4*(x/L)^3); argunit = m; fununit = m
  an2: Analytic "sine_x" | funcname = sine_x; expr = sin(kL*x/L); argunit = m; fununit = 1
  an3: Analytic "cos_x" | funcname = cos_x; expr = cos(kL*x/L); argunit = m; fununit = 1
  an4: Analytic "sine_t" | funcname = sine_t; expr = sin(omega*t); args = t; argunit = s; fununit = 1
  an5: Analytic "cos_t" | funcname = cos_t; expr = cos(omega*t); args = t; argunit = s; fununit = 1
  step1: Step | location = 0.025; smooth = 0.05
  step2: Step | location = .25; smooth = 0.5

Probes
  bnd1: Boundary "Probe drag" on boundaries 5, 6
    type = integral
    expr = spf.T_stressx
    unit = N/m
    descr = Total traction in x
    frame = spatial
    table = tbl2

Common definitions
  free1: DeformingDomain on domains 1
  disp1: PrescribedMeshDisplacement on boundaries 5, 6
    prescribedMeshDisplacement = {0, step2(t/1[s])*theta(x)*( cos_t(t)*sine_x(x) - sine_t(t)*cos_x(x) ), 0}
  fix1: FixedBoundary on boundaries 1-4

Geometry
  geom1 "Geometry 1" (2D, length unit m)
    r1: Rectangle | pos = {-L_tunnel/2, -D_tunnel/2}; size = {L_tunnel*2, D_tunnel}
    ic1: InterpolationCurve "Interpolation Curve top"
      source = file
      filename = /scratch/pz25/fish_swim/locomotion_model/y_top_0.txt
      starttang = {-0.000730444383165, 1.01689210167}
      endtang = {0.987054380828, -0.260834867348}
    ic2: InterpolationCurve "Interpolation Curve bottom"
      source = file
      filename = /scratch/pz25/fish_swim/locomotion_model/y_btm_0.txt
      starttang = {-0.000730444383165, -1.01689210167}
      endtang = {0.987054380828, 0.260834867348}
    uni1: Union | input = ic1, ic2
    csol1: ConvertToSolid | input = uni1
    sca1: Scale | input = csol1; isotropic = L[1/m]; factor = L[1/m]
    dif1: Difference | input = r1; input2 = sca1
    fin: Finalize "Form Union"

Materials
  mat1: Common "Water, liquid" on domains 1
    def "Basic"
      thermalexpansioncoefficient = alpha_p(T)
      bulkviscosity = muB(T)
      dynamicviscosity = eta(T)
      ratioofspecificheat = gamma_w(T)
      electricconductivity = 5.5e-6[S/m]
      heatcapacity = Cp(T)
      density = rho(T)
      thermalconductivity = k(T)
      soundspeed = cs(T)
      eta: Piecewise
        arg = T
        pieces = 
          {273.15, 413.15, 1.3799566804-0.021224019151*T^1+1.3604562827E-4*T^2-4.6454090319E-7*T^3+8.9042735735E-10*T^4-9.0790692686E-13*T^5+3.8457331488E-16*T^6}
          {413.15, 553.75, 0.00401235783-2.10746715E-5*T^1+3.85772275E-8*T^2-2.39730284E-11*T^3}
        argunit = K
        fununit = Pa*s
      Cp: Piecewise | arg = T; pieces = {273.15, 553.75, 12010.1471-80.4072879*T^1+0.309866854*T^2-5.38186884E-4*T^3+3.62536437E-7*T^4}; argunit = K; fununit = J/(kg*K)
      rho: Piecewise
        arg = T
        smooth = contd1
        pieces = 
          {273.15, 293.15, 6.3092789034e-05*T^3-0.0603676398829*T^2+18.9229382407066*T-950.704055329848}
          {293.15, 373.15, 1.0335053319e-05*T^3-0.0133950656345*T^2+4.96928883266*T+432.257114008512}
        argunit = K
        fununit = kg/m^3
      k: Piecewise | arg = T; pieces = {273.15, 553.75, -0.869083936+0.00894880345*T^1-1.58366345E-5*T^2+7.97543259E-9*T^3}; argunit = K; fununit = W/(m*K)
      cs: Interpolation | table = {{273, 1403}, {278, 1427}, {283, 1447}, {293, 1481}, {303, 1507}, {313, 1526}, {323, 1541}, {333, 1552}, {343, 1555}, {353, 1555}, {363, 1550}, {373, 1543}}; interp = piecewisecubic; argunit = K; fununit = m/s
      an1: Analytic | funcname = alpha_p; expr = -1/rho(T)*d(rho(T),T); args = T; argunit = K; fununit = 1/K
      an2: Analytic | funcname = gamma_w; expr = 1+(T/Cp(T))*(alpha_p(T)*cs(T))^2; args = T; argunit = K; fununit = 1
      an3: Analytic | funcname = muB; expr = 2.79*eta(T); args = T; argunit = K; fununit = Pa*s

Physics
  spf: LaminarFlow on all domains
    dependent variable u = {u, v, w}
    fp1: FluidProperties (default)
    init1: init "Initial Values 1" (default)
    wallbc1: WallBC "Wall 1" (default) | BoundaryCondition = Slip
    inl1: InletBoundary "Inlet 1" on boundaries 1 | U0in = U*step2(t/1[s])
    out1: OutletBoundary "Outlet 1" on boundaries 4 | SuppressBackflow = 1
    wallbc2: WallBC "Wall 2" on boundaries 5, 6 | BoundaryCondition = NoSlip

Mesh
  mesh1 "Mesh 1"
    size: MeshSizeDefault | hmax = 9e-4; hmin = 9e-6; hauto = 3; custom = on
    size2: Size on boundaries 5, 6 | table = cfd; hmax = 9e-5; hmin = 9e-7; hauto = 1; custom = on
    ftri1: FreeTri "Free Triangular 1" on remaining entities
    bl1: BndLayer "Boundary Layers 1" on domains 1
      blp: BndLayerProp "Boundary Layer Properties" on boundaries 5, 6 | blnlayers = 5; blhminfact = .5
      blp1: BndLayerProp "Boundary Layer Properties 1" on boundaries 2, 3 | blnlayers = 5

Studies
  std1 "Study 1"
    clusw: ClusterSweep
      pname = {D_tunnel, U}
      plistarr = {"3,10,15", "15.418333538,15.7696816283, 15.742480517"}
      punit = {cm, cm/s}
      accumtable = new
      batchfile = fish-out.mph
      savefile = on
      clustersettings = on
      clustertype = slurm
    time: Transient "Time Dependent" | tlist = range(0,t_step,t_final); usertol = on; rtol = 2e-4

Solver configurations
  sol1 "Solution 1" (study std1)
    v1: Variables "Dependent Variables 1"
      comp1_spatial_disp: Field "Spatial mesh displacement (comp1.spatial.disp)"
        scalemethod = manual
        scaleval = 3.61253788907e-05
    t1: Time "Time-Dependent Solver 1"
      tlist = range(0,t_step,t_final)
      rtol = 2e-4
      atolglobalfactor = 0.05
      atolmethod = {comp1_p, scaled, comp1_spatial_disp, global, comp1_u, global}
      atolvaluemethod = {comp1_p, factor, comp1_spatial_disp, factor, comp1_u, factor}
      atolfactor = {comp1_p, 1, comp1_spatial_disp, 0.1, comp1_u, 0.1}
      maxorder = 2
      stabcntrl = on
      bwinitstepfrac = 0.01
      estrat = exclude
      rhoinf = 0.5
      predictor = constant
      se1: Segregated | ntolfact = 0.5; segstabacc = segaacc; segaaccdim = 5
        ss1: SegregatedStep "Velocity u, Pressure p"
          segvar = {comp1_u, comp1_p}
          linsolver = d1
          subdamp = 0.8
          subjtech = once
        ss2: SegregatedStep "Spatial mesh displacement"
          segvar = {comp1_spatial_disp}
          linsolver = d2
          subdamp = 0.8
          subjtech = once
          subntolfact = 0.1
      d1: Direct "Direct, fluid flow variables (spf)" | linsolver = pardiso; pivotperturb = 1.0E-13
      d2: Direct "Direct, spatial mesh displacement" | linsolver = pardiso; pivotperturb = 1.0E-13

Datasets
  mesh1: Mesh | mesh = mesh1
  dset1: Solution | solution = sol1
  dset2: Solution "Probe Solution 2" | solution = sol1
  int1: Integral "Probe drag" on boundaries 5, 6 | data = dset2

Derived values
  pev1: EvalPoint "Probe drag" | data = int1; table = tbl2; expr = spf.T_stressx

Plots
  pg7: PlotGroup1D "Probe Plot Group 7" | data = none
    tblp1: Table "Probe Table Graph 1" | table = tbl2

Exports
  tbl1: Table "Export drag" | table = tbl2; filename = /scratch/pz25/fish_swim/parametric_h/swim_Uopt/fish_drag_parah.txt
  data1: Data "Export vel"
    data = dset1
    expr = {u, v}
    filename = vel_opt_parah.txt
    location = regulargrid
    regulargridx2 = 300
    regulargridy2 = 100